# AIR 80B4 IM8081
P_н := 1500 = 1500  # kW - rated power
I_kn := 6.2  # A starting current
U_н := 380  # V - rated voltage
M_kn := 2.3  # ratio of short-circuit torque to rated torque
cosfi := 0.78  # power factor of an AC motor
η := 77.5  # efficiency factor
f := 50  # Hz  # supply frequency
p_п := 2  # number of pole pairs
2*π*f/2 = 157.08
n_s := f*60/p_п = 1500
2*π = 6.28319
n_н := 1390 = 1390  # rpm - rated rotational speed
S_н := (n_s - n_н)/n_s = 0.0733333  # rated slip
m_k := M_kn = 2.3
S_k := (m_k + sqrt(m_k^2 - 1))*S_н = 0.320557  # critical slip
C_1 := 1.02  # design factor
I_н := 57735*P_н/1000/(U_н*(η*cosfi)) = 3.77008  # А
# rated current
M_rated := 2.3  # Nm - rated torque
I_rated := 3.78  # A - rated current
M_n := 9550*P_н/1000/n_н = 10.3058  # Nm - rated torque
P_1 := 100*P_н/η = 1935.48  # W - active power consumption from the grid
P_н = 1500
ΔP_m := (P_1 - P_н) = 435.484  # W - motor heat loss
ΔP_m = 435.484
B_m := ΔP_m/1000/(2*π*n_н/60)^2 = 2.05535e-5  # viscous friction coefficient
P_н = 1500
ΔP_m = 435.484
(P_н + ΔP_m) = 1935.48
R_s := 3/2*(U_н/sqrt(3))^2*(1 - S_н)/(C_1*(1 + C_1/S_k)*m_k*(P_н + ΔP_m)) = 3.52341  # Stator resistance
I_kn = 6.2
I_н = 3.77008
R_r := 1/3*(P_н + ΔP_m)/(I_kn^2*I_н^2*(1 - S_н)) = 1.27427  # Rotor resistance
P_н + ΔP_m = 1935.48
I_kn = 6.2
I_н = 3.77008
L_s := 1/(2*π*f)*U_н/sqrt(3)/(I_н*(sqrt(1 - cosfi^2) - cosfi*S_н/S_k)) = 0.41408  # rotor and stator inductance
L_s = 0.41408
L_ls := 1/(4*π*f)*sqrt((U_н/sqrt(3)/(I_kn*I_н))^2 - (R_s + R_r)^2) = 0.0128393  # stator and rotor dissipation inductance
R_1 := R_s
R_2 := R_r
R_r = 1.27427
L_1 := L_s
3*2*0.939 = 5.634
L_2 := L_s
M_rated := 2.3
L_m := L_s - L_ls = 0.401241  # mutual induction
I_rated := 3.78
k_2 := L_m/L_2 = 0.968993
R_1э := R_1 + k_2^2*R_2 = 4.71988  # For motor model
k_1 := L_m/L_1 = 0.968993
σ := 1 - k_1*k_2 = 0.0610522  # machine dissipation factor
T_1э := σ*L_1/R_1э = 0.00535618
# Controllers adjustment
T_1 := L_1/R_1 = 0.117523
T_2 := L_2/R_2 = 0.324956
T_μ1 := 10000  # s
β_рт := σ*T_1*R_1/(2*T_μ1*k_п*k_дт)  # error: Эта переменная не определена.
